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/batch
! ANSYS input file written by Workbench version 2024 R2
! File used for geometry attach: C:\Users\SRUJANA.S\OneDrive\Desktop\Ansys projects\HW01HeatAbsorptionBySolarPanels\HW01HeatAbsorptionBySolarPanels\Geometry - Heat Absorption by Solar Panels.agdb
/title,wbnew--Steady-State Thermal (A5)
/COM,/COM,     ANSYSMotion, 2024.2
/com,--- Data in consistent MKS units. See Solving Units in the help system for more information.
/units,MKS
/prep7
! Turn off shape checking because checks already performed inside WB mesher.
! See help system for more information.
SHPP,OFF,,NOWARN
etcon,set             ! allow ANSYS to choose best KEYOP's for 180x elements, resets any applicable keyopt to MAPDL defaults
/com,*********** Nodes for the whole assembly ***********
nblock,3,,1895
(1i9,3e20.9e3)
     1201     6.531055200E+00     9.954897752E-01     1.356348141E+00
     1202     6.535515474E+00     9.701406783E-01     1.356232077E+00
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-1
/com,*********** Elements for Body 1 'Component1\Panel' ***********
et,1,278
eblock,19,solid,,722
(19i9)
        1        1        1        1        0        0        0        0        8        0        1        1        2        4        3        5        6        8        7
        1        1        1        1        0        0        0        0        8        0        2        5        6        8        7        9       10       12       11
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-1
/com,*********** Elements for Body 2 'Solid' ***********
et,2,278
eblock,19,solid,,2322
(19i9)
        2        2        2        2        0        0        0        0        8        0      723     1470     1723     1583     1583     1639     1639     1639     1639
        2        2        2        2        0        0        0        0        8        0      724     1514     1583     1723     1723     1639     1639     1639     1639
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-1
/com,*********** Send User Defined Coordinate System(s) ***********
csys,0
toffst,273.15,      ! Temperature offset from absolute zero
/com,*********** Send Materials ***********
MP,KXX,1,148,	! W m^-1 C^-1
MP,DENS,1,2330,	! kg m^-3
MP,C,1,712,	! J kg^-1 C^-1

Temperature = 'TEMP' ! Temperature
MP,DENS,2,7850,	! kg m^-3
MP,ALPX,2,1.2e-05,	! C^-1
MP,C,2,434,	! J kg^-1 C^-1
MP,KXX,2,60.5,	! W m^-1 C^-1
MP,RSVX,2,1.7e-07,	! kg m^3 A^-2 s^-3
MP,EX,2,200000000000,	! Pa
MP,NUXY,2,0.3,
MP,MURX,2,10000,

!************************* Model Summary ********************
!Component1\Panel,	Silicon,	matid,	1
!Solid,	Structural Steel,	matid,	2
!************************* End Model Summary ********************
fcum,add                   ! add nodal forces up (needed in case have loads on the same edge,vertex)
fcum                       ! reset default on fcum command since done sending WB F loads
/com,*********** Create "ToSurface(Open)" Radiation ***********
n,1724,_ASMDIAG*0.5*1,0.,0.
nsel,s,node,,1724
cm,_SPND36,node
nsel,all
CMBLOCK,_CM36   ,NODE,      637
(8i10)
        81        82        83        84        85        86        87        88
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spcnod,1,1724
CMBLOCK,_CM36_1 ,ELEM,      106
(8i10)
       748       753       799       859       866       950       952       954
       972       981       994       995      1002      1004      1017      1020
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CMBLOCK,_CM36_2 ,ELEM,      193
(8i10)
       728       739       744       801       826       830       863       873
       997       998      1001      1003      1006      1010      1012      1016
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CMBLOCK,_CM36_4 ,ELEM,      361
(8i10)
        20        21        22        23        24        25        26        27
        28        29        30        31        32        33        34        35
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CMBLOCK,_CM36_5 ,ELEM,      171
(8i10)
       741       743       746       810       984       996       999      1000
      1005      1007      1008      1009      1011      1013      1014      1015
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stef,5.669e-008
esel,all
nsel,all
/com,*********** Create "Internal Heat Generation" ***********
esel,none
esel,a,type,,2
cm,_CM34,elem
esel,all
/com,***************** Define Uniform Initial temperature ***************
tunif,22.
fini
/com,****************************************************************************
/com,*************************    SOLUTION       ********************************
/com,****************************************************************************
/solu
antype,0                   ! static analysis
!eqsl,sparse               ! using sparse solver which is default so no eqsl command needed
cntr,print,1               ! print out contact info and also make no initial contact an error
rescontrol,,none                 ! Do not keep any restart files
dmpoption,emat,no             ! Don't combine emat file for DANSYS
dmpoption,esav,no             ! Don't combine esav file for DANSYS
/com,****************************************************
/com,******************* SOLVE FOR LS 1 OF 1 ****************
sfe,_CM36_1,1,rdsf,1,0.7
sfe,_CM36_1,1,rdsf,2,1
sfe,_CM36_2,2,rdsf,1,0.7
sfe,_CM36_2,2,rdsf,2,1
sfe,_CM36_4,4,rdsf,1,0.7
sfe,_CM36_4,4,rdsf,2,1
sfe,_CM36_5,5,rdsf,1,0.7
sfe,_CM36_5,5,rdsf,2,1
nsel,all
esel,all
d,_SPND36,temp,22.
nsel,all
esel,all
bfe,_CM34,hgen,,10000.
autots,on                   ! User turned on automatic time stepping
nsub,25,100,10,OFF
time,1.
outres,erase
outres,all,none
outres,nsol,all
outres,rsol,all
outres,eangl,all
outres,veng,all
outres,fflux,all,
outres,cont,all,
outres,misc,all
cnvtol,heat,,1.e-004,,1.e-006 ! Program Controlled. Set MINREF equivalent of 1e-6 Watts
RADOPT,,0.0001,,1000,0.1,0.1
HEMIOPT,10,1.e-006  ! Hemicube Resolution for View Factor Calculation and Tolerance based on the unit system
cmsel,s,_CM36
esln
RSURF,,,3  ! Create SURF252/251 elements for POST
nsel,all
esel,all
! *********** WB SOLVE COMMAND ***********
! check interactive state
*get,ANSINTER_,active,,int
*if,ANSINTER_,ne,0,then
/eof
*endif
solve
/com *************** Write FE CONNECTORS *********
CEWRITE,file,ce,,INTE
/com,****************************************************
/com,*************** FINISHED SOLVE FOR LS 1 *************
/post1
fini
